*Heading
** Job name: BEAM-bending Model name: Model-1
** Generated by: Abaqus/CAE Learning Edition 2022
*Preprint, echo=NO, model=NO, history=NO, contact=NO
**
** PARTS
**
*Part, name=BEAM
*Node
      1,           0.,           0.,           0.
      2,          20.,           0.,           0.
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*Element, type=B31
 1,  1,  2
 2,  2,  3
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*Nset, nset=Set-1, generate
  1,  51,   1
*Elset, elset=Set-1, generate
  1,  50,   1
*Nset, nset=Set-2, generate
  1,  51,   1
*Elset, elset=Set-2, generate
  1,  50,   1
** Section: BEAM  Profile: IBEAM
*Beam Section, elset=Set-1, material=STEEL, temperature=GRADIENTS, section=I
40., 80., 46., 46., 5.2, 5.2, 3.8
0.,0.,-1.
*End Part
**
**
** ASSEMBLY
**
*Assembly, name=Assembly
**
*Instance, name=BEAM-1, part=BEAM
*End Instance
**
*Nset, nset=BC, instance=BEAM-1
 1,
*Nset, nset=Set-1, instance=BEAM-1
 51,
*End Assembly
**
** MATERIALS
**
*Material, name=STEEL
*Elastic
206000., 0.1
** ----------------------------------------------------------------
**
** STEP: Step-1
**
*Step, name=Step-1, nlgeom=NO
*Static
1., 1., 1e-05, 1.
**
** BOUNDARY CONDITIONS
**
** Name: BC-1 Type: Displacement/Rotation
*Boundary
BC, 1, 1
BC, 2, 2
BC, 3, 3
BC, 4, 4
BC, 5, 5
BC, 6, 6
**
** LOADS
**
** Name: Load-1   Type: Concentrated force
*Cload
Set-1, 2, -1000.
**
** OUTPUT REQUESTS
**
*Restart, write, frequency=0
**
** FIELD OUTPUT: F-Output-1
**
*Output, field
*Node Output
CF, RF, U
*Element Output, directions=YES
LE, PE, PEEQ, PEMAG, S, SF
*Contact Output
CDISP, CSTRESS
**
** HISTORY OUTPUT: H-Output-1
**
*Output, history, variable=PRESELECT
*End Step
